<neuroml xmlns="http://www.neuroml.org/schema/neuroml2"  xmlns:xs="http://www.w3.org/2001/XMLSchema" xmlns:xsi="http://www.w3.org/2001/XMLSchema-instance" xsi:schemaLocation="http://www.neuroml.org/schema/neuroml2 https://raw.github.com/NeuroML/NeuroML2/development/Schemas/NeuroML2/NeuroML_v2beta5.xsd" id="MiniSpikeManual">

  <spikeArray id="TheManySpikeArray">
    <spike id="0" time="10.0ms"/>
    <spike id="1" time="210.0ms"/>
    <spike id="2" time="1011.0ms"/>
    <spike id="3" time="1506.0ms"/>
    <spike id="4" time="1907.0ms"/>
    <spike id="5" time="2411.0ms"/>
    <spike id="6" time="2508.0ms"/>
    <spike id="7" time="3815.0ms"/>
  </spikeArray>

  <IF_curr_exp id="IF_curr_exp_mb" cm="1." i_offset="0." tau_syn_E="5." tau_syn_I="5." v_init="0." tau_m="20." tau_refrac="0.1" v_reset="-65." v_rest="-65." v_thresh="-50."/>

  <expCurrSynapse id="syn_0" tau_syn="8"/>

  <network id="network" >

    <population id="TheManySpikeArrayPop" component="TheManySpikeArray" size="1" type="populationList">
      <instance id="0">
	<location x="0" y="0" z="5"/>
      </instance>
    </population>

    <population id="mb" component="IF_curr_exp_mb" size="1" type="populationList">
      <instance id="0">
	<location x="0." y="0." z="10"/>
      </instance>
    </population>

    <synapticConnection from="TheManySpikeArrayPop[0]"
			to="mb[0]"
			synapse="syn_0"/>

    <!-- <projection id="TheManySpikeArrayPop_to_mb" -->
    <!-- 		presynapticPopulation="TheManySpikeArrayPop" -->
    <!-- 		postsynapticPopulation="mb" -->
    <!-- 		synapse="syn_0"> -->
    <!--   <connection id="0" -->
    <!-- 		  preCellId="../TheManySpikeArrayPop/0/TheManySpikeArray" -->
    <!-- 		  postCellId="../mb/0/IF_curr_exp_mb"/> -->
    <!-- </projection> -->

  </network>

</neuroml>
